// SBML level 2 version 4

function Constant_flux__irreversible(v)
  v;
end
Constant_flux__irreversible is "Constant flux (irreversible)";

function Henri_Michaelis_Menten__irreversible(substrate, Km, V)
  V*substrate/(Km + substrate);
end
Henri_Michaelis_Menten__irreversible is "Henri-Michaelis-Menten (irreversible)";

function exchange(Tmf, vex, ktf, Tmr, vin, ktr, a, b)
  (Tmf*a*vex/ktf - Tmr*b*vin/ktr)/(1 + vex*a/ktf + vin*b/ktr);
end

model New_Model()

  // Compartments:
  compartment cell = 1e-9;
  compartment ext = 0.125;

  // Species:
  substanceOnly species no3_ex in ext = 6.25e-5;
  substanceOnly species no3_p in cell = 0;
  substanceOnly species no2_p in cell = 0;
  substanceOnly species nh4_p in cell = 0;
  substanceOnly species nh4_ex in ext = 6.25e-5;
  substanceOnly species nh4_a in cell = 0;
  substanceOnly species no2_ex in ext = 0;
  substanceOnly species no3_l in ext = 0;
  substanceOnly species no3_u in ext = 0;
  substanceOnly species nh4_u in ext = 0;

  // Parameters:
  _E1 = 1.67e-6 unit_0; _E1 is "[E1]";
  _E2 = 1.67e-6 unit_0; _E2 is "[E2]";
  kcat1 = 240 unit_1;
  kcat2 = 1350 unit_1;
  km1 = 0.0013;
  km2 = 4.6e-5 unit_0;
  tmf_nh4 = 6.5e-9 unit_2;
  tmr_nh4 = 2.67e-10 unit_2;
  ktf_nh4 = 1.2e-8 unit_3;
  ktr_nh4 = 7.3e-8 unit_3;
  tmf_no3 = 2.167e-7 unit_2;
  tmr_no3 = 4.5e-10 unit_2;
  ktf_no3 = 0.0074 unit_3;
  ktr_no3 = 1.8e-10 unit_3;
  _m = 4.686e-5 unit_1; _m is "μm";
  tmf_no2 = 3.67e-9 unit_2;
  tmr_no2 = 9.167e-9 unit_2;
  ktf_no2 = 3.1e-5 unit_3;
  ktr_no2 = 3.8e-7 unit_3;
  ks = 0.00046111;
  leach = 9e-11;
  up = 1e-11;
  up_amm = 1e-11;
  μ = 2.437806e-5 unit_1;
  ModelValue_0_0 = _E1; ModelValue_0_0 is "Initial for [E1]";
  ModelValue_1_0 = _E2; ModelValue_1_0 is "Initial for [E2]";
  ModelValue_2_0 = kcat1; ModelValue_2_0 is "Initial for kcat1";
  ModelValue_3_0 = kcat2; ModelValue_3_0 is "Initial for kcat2";
  ModelValue_22_0 = ks; ModelValue_22_0 is "Initial for ks";

  // Assignment rules:
  // (no variable named) := _m*(nh4_ex/ext/(ModelValue_22_0 + nh4_ex/ext));
  Vm2 := ModelValue_1_0*ModelValue_3_0;
  Vm1 := ModelValue_0_0*ModelValue_2_0;

  // Rate rules:
  cell' = *cell;

  // Reactions:
  no3_tranport: no3_ex -> no3_p; exchange(tmf_no3, ext, ktf_no3, tmr_no3, cell, ktr_no3, no3_ex/ext, no3_p/cell);
  nar: no3_p => no2_p; cell*Henri_Michaelis_Menten__irreversible(no3_p/cell, km1, Vm1);
  nrf: no2_p => nh4_p; cell*Henri_Michaelis_Menten__irreversible(no2_p/cell, km2, Vm2);
  nh4_transport: nh4_ex -> nh4_p; exchange(tmf_nh4, ext, ktf_nh4, tmr_nh4, cell, ktr_nh4, nh4_ex/ext, nh4_p/cell);
  assimilation: nh4_p => nh4_a; k1*nh4_p;
    k1 = 5e-5;
  no2_transport: no2_ex -> no2_p; exchange(tmf_no2, ext, ktf_no2, tmr_no2, cell, ktr_no2, no2_ex/ext, no2_p/cell);
  no3_leach: no3_ex => no3_l; ext*Constant_flux__irreversible(leach);
  nh4_uptake: nh4_ex => nh4_u; ext*Constant_flux__irreversible(up_amm);
  no3_uptake: no3_ex => no3_u; ext*Constant_flux__irreversible(up);

  // Events:
  no3_neg: at (no3_ex/ext <= 0): up = 0, leach = 0;
  nh4_neg: at (nh4_ex/ext <= 0): up_amm = 0;
  cell_excess: at (cell >= 10^(-4)): _m = 0;
  amm_toxic: at (nh4_p/cell >= 0.01): ktf_nh4 = 1e20;

  // Unit definitions:
  unit unit_0 = mole / litre; unit_0 is "mol/l";
  unit unit_1 = 1 / second; unit_1 is "s^-1";
  unit unit_2 = mole / second; unit_2 is "mol/s";
  unit substance = mole;
  unit length = metre;
  unit area = metre^2;
  unit volume = litre;
  unit time = second;
  unit unit_3 = mole; unit_3 is "mol";
end
